fini
/clear,nostart
/prep7

a=0.2
b=0.1
esize,0.01
pi=acos(-1)


rect,0,2*a,0,2*a
cm,obl,area
asel,none
rect,b,a+b,b,a+b
cm,centr,area
asel,a,,,obl
asba,obl,centr,,delete,delete
wprota,0,0,90
wpave,b,0,0
asbw,all
wpave,b+a,0,0
asbw,all
wprota,0,90,0
wpave,0,b,0
asbw,all
wpave,0,b+a,0
asbw,all

lsel,s,loc,x,b/2
lsel,a,loc,x,2*a-b/2
lsel,a,loc,y,b/2
lsel,a,loc,y,2*a-b/2
lsel,u,loc,x,0
lsel,u,loc,x,2*a
lsel,u,loc,y,0
lsel,u,loc,y,2*a
cm,perekrestok,line
lesize,perekrestok,,,30,10
lsel,s,loc,x,a
lsel,a,loc,y,a
lsel,a,loc,x,0
lsel,a,loc,x,2*a
lsel,a,loc,y,0
lsel,a,loc,y,2*a
lesize,all,,,30


cm,nachalo,area
agen,3,nachalo,,,0.4,,,,0
cm,nachalo,area
agen,3,nachalo,,,,0.4,,,0
nummrg,all
cm,niz,area
agen,2,niz,,,,,a,,0
asel,u,,,niz
cm,seredina,area
asel,none
wpave,0,0,a
wprota,0,0,-90
wprota,90,0,0
rect,0,6*a,0,6*a
cm,verxall,area
asel,none
rect,2*a+b,3*a+b,2*a+b,3*a+b
cm,verxantiall,area
asel,a,,,verxall
asba,verxall,verxantiall,,delete,delete
cm,verxall1,area
asel,a,,,seredina
asba,verxall1,seredina,,delete,delete
cm,seredina,area
asel,s,,,niz
et,1,200,6
amesh,all

asel,none
wpave,0,0,0
rect,0,6*a,0,6*a
cm,rect1,area
asel,none
wpave,3*a,3*a,0
wprota,22.5,0,0
cswpla,11,0,,
blc5,0,0,6*a*(cos(pi/8)+sin(pi/8)),6*a*(cos(pi/8)+sin(pi/8))
cm,rect2,area
asel,a,,,rect1
asba,rect2,rect1,,delete,delete
csys,0
wprota,-22.5,0,0
wprota,0,0,-90
wpave,b,0,0
asbw,all
wpave,b+a,0,0
asbw,all
wpave,2*a,0,0
asbw,all
wpave,2*a+b,0,0
asbw,all
wpave,3*a+b,0,0
asbw,all
wpave,4*a,0,0
asbw,all
wpave,4*a+b,0,0
asbw,all
wpave,5*a+b,0,0
asbw,all
wpave,6*a,0,0
asbw,all

wprota,0,-90,0
wpave,0,b,0
asbw,all
wpave,0,b+a,0
asbw,all
wpave,0,2*a,0
asbw,all
wpave,0,2*a+b,0
asbw,all
wpave,0,3*a+b,0
asbw,all
wpave,0,4*a,0
asbw,all
wpave,0,4*a+b,0
asbw,all
wpave,0,5*a+b,0
asbw,all
wpave,0,6*a,0
asbw,all

wprota,0,90,0
wprota,0,0,90
nummrg,all
amesh,all
asel,a,,,niz
cm,niz,area

csys,0

et,2,200,10
type,2
extopt,esize,30,0
vext,all,,,0,0,a
asel,a,,,seredina
nummrg,all

asel,s,,,seredina
type,1
amesh,all
asel,s,loc,z,a
type,2
extopt,esize,30,0
vext,all,,,0,0,a
asel,none
wpave,0,0,2*a
rect,2*a+b,3*a+b,2*a+b,3*a+b
cm,verx,area
allsel
nummrg,all
asel,s,,,verx
type,1
amesh,all
asel,s,loc,z,2*a
type,2
extopt,esize,30,0
vext,all,,,0,0,a

asel,s,loc,x,b
asel,a,loc,y,b
asel,a,loc,x,b+a
asel,a,loc,y,b+a
asel,a,loc,x,b+2*a
asel,a,loc,y,b+2*a
asel,a,loc,x,b+3*a
asel,a,loc,y,b+3*a
asel,a,loc,x,b+4*a
asel,a,loc,y,b+4*a
asel,a,loc,x,b+5*a
asel,a,loc,y,b+5*a
asel,a,loc,z,a
asel,a,loc,z,2*a
asel,u,loc,x,b/2
asel,u,loc,x,2*a-b/2
asel,u,loc,y,b/2
asel,u,loc,y,2*a-b/2
asel,u,loc,x,2*a+b/2
asel,u,loc,x,4*a-b/2
asel,u,loc,y,2*a+b/2
asel,u,loc,y,4*a-b/2
asel,u,loc,x,4*a+b/2
asel,u,loc,x,6*a-b/2
asel,u,loc,y,4*a+b/2
asel,u,loc,y,6*a-b/2
asel,u,loc,x,0
asel,u,loc,x,2*a
asel,u,loc,x,4*a
asel,u,loc,x,6*a
asel,u,loc,y,0
asel,u,loc,y,2*a
asel,u,loc,y,4*a
asel,u,loc,y,6*a

asel,u,loc,z,2*a
asel,u,loc,z,2.5*a
asel,r,loc,x,-0.0001,6*a+0.00001
asel,r,loc,y,-0.0001,6*a+0.00001
cm,dombk,area
asel,r,loc,x,0,2*a
asel,u,loc,z,a+b
cm,wall1,area
asel,s,,,dombk
asel,r,loc,x,4*a,6*a
asel,u,loc,z,a+b
cm,wall2,area
asel,s,,,dombk
asel,r,loc,x,2*a,4*a
asel,r,loc,y,2*a,4*a
cm,wall4,area
asel,s,,,dombk
asel,r,loc,x,2*a,4*a
asel,u,loc,y,2*a,4*a
asel,u,loc,z,a+b
asel,a,,,wall1
asel,a,,,wall2
asel,a,,,wall4
asel,a,loc,z,0
cm,dombk,area
asel,s,loc,x,3*a
asel,r,loc,y,3*a
asel,r,loc,z,2*a
asel,a,,,dombk
cm,wall,area


wpave,3*a,3*a,0
wprota,22.5,0,0
cswpla,11,0,,
wpave,-3*a*(cos(pi/8)+sin(pi/8)),-3*a*(cos(pi/8)+sin(pi/8)),0
cswpla,12,0,,
asel,s,loc,x,0
cm,inlet,area
asel,s,loc,x,6*a*(cos(pi/8)+sin(pi/8))
cm,outlet,area
asel,s,loc,y,0
cm,left,area
asel,s,loc,y,6*a*(cos(pi/8)+sin(pi/8))
cm,right,area
asel,s,loc,z,3*a
cm,top,area
asel,all
extopt,esize,30,10
vext,left,,,0,-12*a*(cos(pi/8)+sin(pi/8)),0
vext,right,,,0,12*a*(cos(pi/8)+sin(pi/8)),0

asel,s,loc,x,0
cm,inlet,area
asel,s,loc,x,6*a*(cos(pi/8)+sin(pi/8))
cm,outlet,area
asel,all
vext,inlet,,,-12*a*(cos(pi/8)+sin(pi/8)),0,0
vext,outlet,,,30*a*(cos(pi/8)+sin(pi/8)),0,0

asel,s,loc,z,3*a
cm,top,area
vext,top,,,0,0,12*a
allsel
asel,s,loc,z,0
asel,a,,,wall
cmdele,all
nsla,s,1
cm,wall,node
asel,s,loc,x,-12*a*(cos(pi/8)+sin(pi/8))
nsla,s,1
cm,inlet,node
asel,s,loc,x,36*a*(cos(pi/8)+sin(pi/8))
nsla,s,1
cm,outlet,node
asel,s,loc,y,-12*a*(cos(pi/8)+sin(pi/8))
nsla,s,1
cm,left,node
asel,s,loc,y,18*a*(cos(pi/8)+sin(pi/8))
nsla,s,1
cm,right,node
asel,s,loc,z,15*a
nsla,s,1
cm,top,node
allsel
csys,0
cdwrite,db,setochka22.5,cdb
